ring wing test
0.05
0   0   0
10   2   25
0   0   0
0
#
#--------------------------------
#
SURFACE
RING WING
# Nchordwise  Cspace   Nspanwise   Sspace
10         1      20        1
#
YDUPLICATE
0.0
#
ANGLE
0.00
#
# x,y,z bias for whole surface
TRANSLATE
0.00    0.00      0.00
#----------------------------------------------------------
    Xle         Yle         Zle         chord       angle   Nspan  Sspace
SECTION
0.000000 0.000000 3.800000 1.900000 8.181818
NACA
0012
SECTION
0.000000 0.535292 3.723037 1.900000 8.181818
NACA
0012
SECTION
0.000000 1.027218 3.498382 1.900000 8.181818
NACA
0012
SECTION
0.000000 1.435924 3.144235 1.900000 8.181818
NACA
0012
SECTION
0.000000 1.728301 2.689289 1.900000 8.181818
NACA
0012
SECTION
0.000000 1.880661 2.170398 1.900000 8.181818
NACA
0012
SECTION
0.000000 1.880661 1.629602 1.900000 8.181818
NACA
0012
SECTION
0.000000 1.728301 1.110711 1.900000 8.181818
NACA
0012
SECTION
0.000000 1.435924 0.655765 1.900000 8.181818
NACA
0012
SECTION
0.000000 1.027218 0.301618 1.900000 8.181818
NACA
0012
SECTION
0.000000 0.535292 0.076963 1.900000 8.181818
NACA
0012
SECTION
0  0   0  1.900000   8.181818
NACA
0012
#
#--------------------------------
#
SURFACE
CONTROL VANE 1
# Nchordwise  Cspace   Nspanwise   Sspace
10         1      20        1
SECTION
1.805 0 0 0.5 0
NACA
0016
SECTION
1.805 0 3.8 0.5 0
NACA
0016
#
#--------------------------------
#
SURFACE
CONTROL VANE 2
# Nchordwise  Cspace   Nspanwise   Sspace
10         1      20        1
SECTION
1.805 -1.9 1.9 0.5 0
NACA
0016
SECTION
1.805 1.9 1.9 0.5 0
NACA
0016
#
#--------------------------------
#
SURFACE
Support
# Nchordwise  Cspace   Nspanwise   Sspace
10         1      20        1
SECTION
0.475 1.6454482671904336 2.8499999999999996 0.75 0
NACA
0012
SECTION
0.475 -2.5 0 0.75 0
NACA
0012
